X := [
    231, 247, 149, 76, 128, 81, 63, 85, 150, 24;
    174, 112, 14, 20, 214, 188, 97, 11, 70, 48;
    149, 62, 202, 168, 46, 5, 24, 246, 47, 32;
    210, 143, 236, 231, 238, 119, 213, 100, 66, 27;
    105, 188, 222, 217, 250, 147, 35, 172, 68, 12;
    82, 19, 132, 204, 156, 169, 44, 236, 29, 15;
    56, 72, 37, 71, 137, 31, 131, 38, 37, 13;
    230, 253, 44, 133, 221, 217, 96, 240, 174, 28;
    226, 108, 177, 37, 252, 191, 10, 31, 74, 46;
    74, 233, 70, 200, 136, 32, 150, 150, 80, 15
]
|X| = -2.99447e19
A := [
    231, 247, 149, 76, 128, 81, 63, 85, 150, 24;
    174, 112, 14, 20, 214, 188, 97, 11, 70, 48;
    149, 62, 202, 168, 46, 5, 24, 246, 47, 32;
    210, 143, 236, 231, 238, 119, 213, 100, 66, 27;
    105, 188, 222, 217, 250, 147, 35, 172, 68, 12;
    82, 19, 132, 204, 156, 169, 44, 236, 29, 15;
    56, 72, 37, 71, 137, 31, 131, 38, 37, 13;
    230, 253, 44, 133, 221, 217, 96, 240, 174, 28;
    226, 108, 177, 37, 252, 191, 10, 31, 74, 46;
    74, 233, 70, 200, 136, 32, 150, 150, 80, 15
]
B := [43; 24; 19; 32; 47; 21; 10; 15; 63; 81]
A1 := [
    2, -5, 4, 5, 8, -3;
    0, 1, 6, -4, 2, 5;
    -3, 1, 1, 8, -4, 5;
    1, 5, 2, 7, 6, 9;
    4, 5, 8, 9, 7, 2;
    1, 3, 8, 4, 6, 7
]
B1 := [1; 5; 6; 3; 4; 8]
X := A1^-1*B1
X := A^-1*B
X = [2.19527; -4.36204; -4.57337; 8.85662; 2.90872; -4.33535; -5.42128; -4.51284; 8.11173; 4.53605]
X = [2.19527; -4.36204; -4.57337; 8.85662; 2.90872; -4.33535; -5.42128; -4.51284; 8.11173; 4.53605]
